p := 0.4
λ := 0.45
μ := 0.5
Given
P00 + P01 + P02 + P11 + P12 + P22 == 1
P11*(μ + λ*p) == P01*λ*(1 - p)
P01*(μ + λ) == P00*(1 - p)*λ + P12*μ + P11*μ
P00*λ == P02*μ + P01*μ
P02*(λ + μ) == P22*μ + P00*λ*p
P22*μ == P02*λ*p + P12*λ*p
[P00; P01; P02; P11; P12; P22] := Find(P00, P01, P02, P11, P12, P22) → [0.369003690037; 0.216395662741; 0.115707658292; 0.0859218072649; 0.125967959323; 0.0870032223416]
A_high := (P02 + P12 + P22)*μ = 0.164339
A_low := (P01 + P11)*μ = 0.151159
Q_high := (A_high/(λ*p)) = 0.912997
Q_low := (A_low/(λ*(1 - p))) = 0.559847
